// SBML level 3 version 2

model Vi_model_event()

  // Parameters:
  C_u = 1/(1/kappa + exp(-rho)*(1/(400*ini_theta) - 1/kappa));
  rho = 0.01;
  C_i = 0;
  kappa = 0.01;
  psi_1 = 0.01;
  V_e = virus_injection;
  alpha = 0.01;
  V_i = 0;
  psi_2 = 0.01;
  zeta = 0.01;
  delta = 0.01;
  ini_theta = 1;
  virus_injection = 1*1000000000;

  // Rate rules:
  C_u' = rho*C_u*(1 - (C_u + C_i)/kappa) - psi_1*V_e*C_u;
  C_i' = rho*C_i*(1 - (C_u + C_i)/kappa) + psi_1*V_e*C_u - alpha*V_i;
  V_e' = alpha*V_i*V_i/(C_i + 1e-6) - psi_1*V_e*C_u - psi_2*V_e*C_i - delta*V_e;
  V_i' = psi_1*V_e*C_u + psi_2*V_e*C_i + zeta*C_i - alpha*V_i*V_i/(C_i + 1e-6);

  // Events:
  _E0: at (C_u < 0.01): C_u = 0;
end
