// SBML level 3 version 2

model dividing_infected_cells()

  // Parameters:
  C_u = 1/(1/kappa + exp(-rho)*(1/(400*ini_theta) - 1/kappa));
  rho = 0.01;
  C_i = 0;
  C_i1 = 0;
  C_i2 = 0;
  C_i3 = 0;
  C_i4 = 0;
  C_i5 = 0;
  C_l = 0;
  kappa = 0.01;
  psi = 0.01;
  V = virus_injection;
  phi = 0.01;
  alpha = 0.01;
  beta = 0.01;
  delta = 0.01;
  ini_theta = 1;
  virus_injection = 1*1000000000;

  // Rate rules:
  C_u' = rho*C_u*(1 - (C_u + C_i + C_i1 + C_i2 + C_i3 + C_i4 + C_i5 + C_l)/kappa) - psi*V*C_u;
  C_i' = rho*C_i*(1 - (C_u + C_i + C_i1 + C_i2 + C_i3 + C_i4 + C_i5 + C_l)/kappa) + psi*V*C_u - phi*C_i;
  C_i1' = rho*C_i1*(1 - (C_u + C_i + C_i1 + C_i2 + C_i3 + C_i4 + C_i5 + C_l)/kappa) + phi*C_i - phi*C_i1;
  C_i2' = rho*C_i2*(1 - (C_u + C_i + C_i1 + C_i2 + C_i3 + C_i4 + C_i5 + C_l)/kappa) + phi*C_i1 - phi*C_i2;
  C_i3' = rho*C_i3*(1 - (C_u + C_i + C_i1 + C_i2 + C_i3 + C_i4 + C_i5 + C_l)/kappa) + phi*C_i2 - phi*C_i3;
  C_i4' = rho*C_i4*(1 - (C_u + C_i + C_i1 + C_i2 + C_i3 + C_i4 + C_i5 + C_l)/kappa) + phi*C_i3 - phi*C_i4;
  C_i5' = rho*C_i5*(1 - (C_u + C_i + C_i1 + C_i2 + C_i3 + C_i4 + C_i5 + C_l)/kappa) + phi*C_i4 - phi*C_i5;
  C_l' = rho*C_l*(1 - (C_u + C_i + C_i1 + C_i2 + C_i3 + C_i4 + C_i5 + C_l)/kappa) + phi*C_i5 - alpha*C_l;
  V' = beta*alpha*C_l - psi*V*C_u - delta*V;

  // Events:
  _E0: at (C_u < 0.01): C_u = 0;
end
