// SBML level 3 version 2

model dividing_infected_cells_BE()

  // Parameters:
  C_u = 1/(kappa + exp(-rho)*(1/400 - kappa))*exp(theta*theta_flag);
  rho = 0.01;
  kappa = 0.01;
  C_i = 0;
  C_i1 = 0;
  C_i2 = 0;
  C_i3 = 0;
  C_i4 = 0;
  C_i5 = 0;
  C_l = 0;
  psi = 0.01;
  V = virus_injection;
  phi = 0.01;
  alpha = 0.01;
  beta = 0.01;
  delta = 0.01;
  theta = 0.01;
  theta_flag = 1;
  virus_injection = 3*1000000000;

  // Rate rules:
  C_u' = rho*C_u*(1 - kappa*(C_u + C_i + C_i1 + C_i2 + C_i3 + C_i4 + C_i5 + C_l)) - psi*V*C_u;
  C_i' = rho*C_i*(1 - kappa*(C_u + C_i + C_i1 + C_i2 + C_i3 + C_i4 + C_i5 + C_l)) + psi*V*C_u - phi*C_i;
  C_i1' = rho*C_i1*(1 - kappa*(C_u + C_i + C_i1 + C_i2 + C_i3 + C_i4 + C_i5 + C_l)) + phi*C_i - phi*C_i1;
  C_i2' = rho*C_i2*(1 - kappa*(C_u + C_i + C_i1 + C_i2 + C_i3 + C_i4 + C_i5 + C_l)) + phi*C_i1 - phi*C_i2;
  C_i3' = rho*C_i3*(1 - kappa*(C_u + C_i + C_i1 + C_i2 + C_i3 + C_i4 + C_i5 + C_l)) + phi*C_i2 - phi*C_i3;
  C_i4' = rho*C_i4*(1 - kappa*(C_u + C_i + C_i1 + C_i2 + C_i3 + C_i4 + C_i5 + C_l)) + phi*C_i3 - phi*C_i4;
  C_i5' = rho*C_i5*(1 - kappa*(C_u + C_i + C_i1 + C_i2 + C_i3 + C_i4 + C_i5 + C_l)) + phi*C_i4 - phi*C_i5;
  C_l' = rho*C_l*(1 - kappa*(C_u + C_i + C_i1 + C_i2 + C_i3 + C_i4 + C_i5 + C_l)) + phi*C_i5 - alpha*C_l;
  V' = beta*alpha*C_l - psi*V*C_u - delta*V;
end
